<aerodynamics>

    <axis name="LIFT">

        <!-- Lift above 0.85 and below -0.85 is generalised -->
        <function name="aero/force/Lift_alpha">
            <description>Lift due to alpha</description>
            <product>
                <property>aero/qbar-psf</property>
                <property>metrics/Sw-sqft</property>
                <table>
                    <independentVar lookup="row">aero/alpha-deg</independentVar>
                    <independentVar lookup="column">aero/beta-deg</independentVar>
                    <independentVar lookup="table">velocities/mach</independentVar>
                    <tableData breakpoint="0.001">
                                            -10.0           0.0             10.0
                            -10.0   -0.143333       -0.263133       0.122375
                            0.0     0.332314        0.006962        -0.412691
                            10.0    0.463517        0.275386        0.317540
                    </tableData>
                    <tableData breakpoint="0.45">
                                            -10.0           0.0             10.0
                            -10.0   -0.408879       -0.288243       -0.162769
                            0.0     -0.695544       0.006355        -0.039281
                            10.0    0.307352        0.287058        0.303537
                    </tableData>
                    <tableData  breakpoint="0.9">
                                            -10.0           0.0             10.0
                            -10.0   11.734658       -0.312994       -1.529312
                            0.0     -5.460793       0.003954        -0.151409
                            10.0    0.100393        0.349951        0.178506
                    </tableData>
                </table>
            </product>
        </function>

        <function name="aero/force/Lift_pitch_rate">
            <description>Lift due to pitch rate</description>
            <product>
                <property>aero/qbar-psf</property>
                <property>metrics/Sw-sqft</property>
                <property>velocities/q-aero-rad_sec</property>
                <property>aero/ci2vel</property>
                <value> 3.7047 </value>
            </product>
        </function>

        <function name="aero/force/Lift_alpha_rate">
            <description>Lift due to alpha rate</description>
            <product>
                <property>aero/qbar-psf</property>
                <property>metrics/Sw-sqft</property>
                <property>aero/alphadot-rad_sec</property>
                <property>aero/ci2vel</property>
                <value> 2.6943 </value>
            </product>
        </function>

        <function name="aero/force/Lift_elevator">
            <description>Lift due to Elevator Deflection</description>
            <product>
                <property>aero/qbar-psf</property>
                <property>metrics/Sw-sqft</property>
                <property>fcs/elevator-pos-rad</property>
                <value> 0.5904 </value>
            </product>
        </function>

        <function name="aero/force/Lift_flap">
            <description>Delta Lift due to flaps</description>
            <product>
                <property>aero/qbar-psf</property>
                <property>metrics/Sw-sqft</property>
                <property>fcs/flap-pos-deg</property>
                <value> 0.0107 </value>
            </product>
        </function>


    </axis>

    <axis name="DRAG">

        <!-- CD0 is based on fuselage, wing, horizontal- en vertical tail -->
        <!-- Antennas, struts and wires are not taken into account        -->
        <!-- CD for gear (fixed and retractable) is defined below         -->
        <function name="aero/force/Drag_minimum">
            <description>Minimum drag</description>
            <product>
                <property>aero/qbar-psf</property>
                <property>metrics/Sw-sqft</property>
                <value> 0.0131 </value>
            </product>
        </function>

        <function name="aero/force/Drag_alpha">
            <description>Drag due to alpha</description>
            <product>
                <property>aero/qbar-psf</property>
                <property>metrics/Sw-sqft</property>
                <table>
                    <independentVar lookup="row">aero/alpha-rad</independentVar>
                    <tableData>
                        -1.57 1.4088
                        -0.54 0.2078
                        0.00 0.0000
                        0.54 0.2078
                        1.57 1.4088
                    </tableData>
                </table>
            </product>
        </function>

        <function name="aero/force/Drag_base">
            <description>Drag due to alpha and beta</description>
			<product>
				<property>aero/qbar-psf</property>
				<property>metrics/Sw-sqft</property>
                <table>
                    <independentVar lookup="row">aero/alpha-deg</independentVar>
                    <independentVar lookup="column">aero/beta-deg</independentVar>
                    <independentVar lookup="table">velocities/mach</independentVar>
                    <tableData breakpoint="0.001">
                                            -10.0           0.0             10.0
                            -10.0   0.030952        0.005278        0.007761
                            0.0     0.105025        0.004281        0.017500
                            10.0    0.024367        0.005273        0.014306
                    </tableData>
                    <tableData breakpoint="0.45">
                                            -10.0           0.0             10.0
                            -10.0   0.006806        0.005444        0.017471
                            0.0     0.030030        0.004281        0.004539
                            10.0    0.005706        0.005399        0.005661
                    </tableData>
                    <tableData brekapoint="0.9">
                                            -10.0           0.0             10.0
                            -10.0   4.374890        0.005966        0.245214
                            0.0     2.054315        0.004308        0.006255
                            10.0    0.006120        0.006383        0.015601
                    </tableData>
                </table>
            </product>
        </function>

        <function name="aero/force/Drag_induced">
            <description>Induced drag</description>
            <product>
                <table>
                    <independentVar lookup="row">aero/alpha-deg</independentVar>
                    <independentVar lookup="column">aero/beta-deg</independentVar>
                    <independentVar lookup="table">velocities/mach</independentVar>
                    <tableData breakpoint="0.001">
                                            -10.0           0.0             10.0
                            -10.0   -0.630443       0.026751        -1.678921
                            0.0     -0.895188       -0.000450       -0.337546
                            10.0    -0.400253       0.013985        -0.341320
                    </tableData>
                    <tableData breakpoint="0.45">
                                            -10.0           0.0             10.0
                            -10.0   -0.109565       0.025540        -0.156217
                            0.0     0.015605        -0.000683       -0.046736
                            10.0    -0.024270       0.016952        -0.026356
                    </tableData>
                    <tableData breakpoint="0.9">
                                            -10.0           0.0             10.0
                            -10.0   49.775961       0.013838        -0.492069
                            0.0     0.928982        0.000469        -0.026604
                            10.0    0.072080        0.030603        0.101805
                    </tableData>
                </table>
            </product>
        </function>

        <function name="aero/force/Drag_mach">
            <description>Drag due to mach</description>
            <product>
                <property>aero/qbar-psf</property>
                <property>metrics/Sw-sqft</property>
                <table>
                    <independentVar lookup="row">velocities/mach</independentVar>
                    <tableData>
                        0.00 0.0000
                        0.81 0.0000
                        1.10 0.0230
                        1.80 0.0150
                    </tableData>
                </table>
            </product>
        </function>

        <function name="aero/force/Drag_beta">
            <description>Drag due to sideslip</description>
            <product>
                <property>aero/qbar-psf</property>
                <property>metrics/Sw-sqft</property>
                <table>
                    <independentVar lookup="row">aero/beta-rad</independentVar>
                    <tableData>
                        -1.57 1.2300
                        -0.26 0.0500
                        0.00 0.0000
                        0.26 0.0500
                        1.57 1.2300
                    </tableData>
                </table>
            </product>
        </function>

        <function name="aero/force/Drag_elevator">
            <description>Drag due to Elevator Deflection</description>
            <product>
                <property>aero/qbar-psf</property>
                <property>metrics/Sw-sqft</property>
                <abs>
                    <property>fcs/elevator-pos-rad</property>
                </abs>
                <value> 0.0400 </value>
            </product>
        </function>

        <function name="aero/force/Drag_gear">
            <description>Drag due to gear</description>
            <product>
                <property>aero/qbar-psf</property>
                <property>metrics/Sw-sqft</property>
                <property>gear/gear-pos-norm</property>
                <value> 0.0200 </value>
            </product>
        </function>

        <function name="aero/force/Drag_flap">
            <description>Drag due to flaps</description>
            <product>
                <property>aero/qbar-psf</property>
                <property>metrics/Sw-sqft</property>
                <property>fcs/flap-pos-deg</property>
                <value> 0.0023 </value>
            </product>
        </function>


        <function name="aero/force/Drag_speedbrake">
            <description>Drag due to speedbrakes</description>
            <product>
                <property>aero/qbar-psf</property>
                <property>metrics/Sw-sqft</property>
                <property>fcs/speedbrake-pos-norm</property>
                <value> 0.0800 </value>
            </product>
        </function>

    </axis>

    <axis name="SIDE">

        <function name="aero/force/Side_beta">
            <description>Side force due to beta</description>
            <product>
                <property>aero/qbar-psf</property>
                <property>metrics/Sw-sqft</property>
                <property>aero/beta-rad</property>
                <value> -1.2096 </value>
            </product>
        </function>
        <function name="aero/force/Side_roll_rate">
            <description>Side force due to roll rate</description>
            <product>
                <property>aero/qbar-psf</property>
                <property>metrics/Sw-sqft</property>
                <property>aero/bi2vel</property>
                <property>velocities/p-aero-rad_sec</property>
                <table>
                    <independentVar lookup="row">aero/Re</independentVar>
                    <tableData>
                        14561726 0.4848
                        16017897 0.0384
                        21842586 0.0171
                        29150180 0.0096
                    </tableData>
                </table>
            </product>
        </function>

        <function name="aero/force/Side_yaw_rate">
            <description>Side force due to yaw rate</description>
            <product>
                <property>aero/qbar-psf</property>
                <property>metrics/Sw-sqft</property>
                <property>aero/bi2vel</property>
                <property>velocities/r-aero-rad_sec</property>
                <value> 1.4451 </value>
            </product>
        </function>

        <function name="aero/force/Side_rudder">
            <description>Side force due to rudder</description>
            <product>
                <property>aero/qbar-psf</property>
                <property>metrics/Sw-sqft</property>
                <property>fcs/rudder-pos-rad</property>
                <value> 0.3664 </value>
            </product>
        </function>

    </axis>

    <axis name="PITCH">

        <function name="aero/moment/Pitch_alpha">
            <description>Pitch moment due to alpha</description>
            <product>
                <property>aero/qbar-psf</property>
                <property>metrics/Sw-sqft</property>
                <property>metrics/cbarw-ft</property>
                <property>aero/alpha-rad</property>
                <table>
                    <independentVar lookup="row">aero/alpha-deg</independentVar>
                    <independentVar lookup="column">aero/beta-deg</independentVar>
                    <independentVar lookup="table">velocities/mach</independentVar>
                    <tableData breakpoint="0.001">
                                            -10.0           0.0             10.0
                            -10.0   -17.745595      -0.399361       -50.273358
                            0.0     -51.656596      1.627197        -326.680089
                            10.0    -4.268113       7.008007        -16.279883
                    </tableData>
                    <tableData breakpoint="0.45">
                                            -10.0           0.0             10.0
                            -10.0   34.905944       -0.036071       -3418.577990
                            0.0     -230.041765     4.055698        2.886566
                            10.0    -6.084559       16.026167       -2.691366
                    </tableData>
                    <tableData  breakpoint="0.9">
                                            -10.0           0.0             10.0
                            -10.0   7706076.692803  29.448952       1664.665912
                            0.0     -63063.990566   11.772487       -176.849785
                            10.0    60.770814       14.210308       1026.071360
                    </tableData>
                </table>
            </product>
        </function>

        <function name="aero/moment/Pitch_elevator">
            <description>Pitch moment due to elevator</description>
            <product>
                <property>aero/qbar-psf</property>
                <property>metrics/Sw-sqft</property>
                <property>metrics/cbarw-ft</property>
                <property>fcs/elevator-pos-rad</property>
                <table>
                    <independentVar lookup="row">velocities/mach</independentVar>
                    <tableData>
                        0.0 -1.1758
                        2.0 -0.2939
                    </tableData>
                </table>
            </product>
        </function>

        <function name="aero/moment/Pitch_damp">
            <description>Pitch moment due to pitch rate</description>
            <product>
                <property>aero/qbar-psf</property>
                <property>metrics/Sw-sqft</property>
                <property>metrics/cbarw-ft</property>
                <property>aero/ci2vel</property>
                <property>velocities/q-aero-rad_sec</property>
                <value> -7.6617 </value>
            </product>
        </function>

        <function name="aero/moment/Pitch_alphadot">
            <description>Pitch moment due to alpha rate</description>
            <product>
                <property>aero/qbar-psf</property>
                <property>metrics/Sw-sqft</property>
                <property>metrics/cbarw-ft</property>
                <property>aero/ci2vel</property>
                <property>aero/alphadot-rad_sec</property>
                <value> -5.5721 </value>
            </product>
        </function>

    </axis>

    <axis name="ROLL">

        <function name="aero/moment/Roll_beta">
            <description>Roll moment due to beta</description>
            <product>
                <property>aero/qbar-psf</property>
                <property>metrics/Sw-sqft</property>
                <property>metrics/bw-ft</property>
                <property>aero/beta-rad</property>
                <property>fcs/gear-no-wow</property>
                <table>
                    <independentVar lookup="row">aero/alpha-deg</independentVar>
                    <independentVar lookup="column">aero/beta-deg</independentVar>
                    <independentVar lookup="table">velocities/mach</independentVar>
                    <tableData breakpoint="0.001">
                                            -10.0           0.0             10.0
                            -10.0   0.464861        -0.065600       -2.320820
                            0.0     1.809824        0.155488        35.212447
                            10.0    -0.193214       0.224867        -0.395712
                    </tableData>
                    <tableData breakpoint="0.45">
                                            -10.0           0.0             10.0
                            -10.0   -1.728868       -0.173285       231.950063
                            0.0     38.689002       0.030517        -0.584516
                            10.0    -0.841303       1.032077        1.669167
                    </tableData>
                    <tableData  breakpoint="0.9">
                                            -10.0           0.0             10.0
                            -10.0   -3351.015633    3.549182        -3.215129
                            0.0     5741.408611     -0.742933       -17.396813
                            10.0    1.338618        0.438113        -113.127921
                    </tableData>
                </table>
            </product>
        </function>

        <function name="aero/moment/Roll_damp">
            <description>Roll moment due to roll rate</description>
            <product>
                <property>aero/qbar-psf</property>
                <property>metrics/Sw-sqft</property>
                <property>metrics/bw-ft</property>
                <property>aero/bi2vel</property>
                <property>velocities/p-aero-rad_sec</property>
                <value> -0.2847 </value>
            </product>
        </function>

        <function name="aero/moment/Roll_yaw">
            <description>Roll moment due to yaw rate</description>
            <product>
                <property>aero/qbar-psf</property>
                <property>metrics/Sw-sqft</property>
                <property>metrics/bw-ft</property>
                <property>aero/bi2vel</property>
                <property>velocities/r-aero-rad_sec</property>
                <table>
                    <independentVar lookup="row">aero/alpha-rad</independentVar>
                    <independentVar lookup="column">aero/Re</independentVar>
                    <tableData>
                        14561726 16017897 21842586 29150180
                        -0.0349 0.0574 0.0574 0.0574 0.0574
                        0.3491 6.5306 0.4824 0.4319 0.4319
                    </tableData>
                </table>
            </product>
        </function>

        <function name="aero/moment/Roll_aileron">
            <description>Roll moment due to aileron</description>
            <product>
                <property>aero/qbar-psf</property>
                <property>metrics/Sw-sqft</property>
                <property>metrics/bw-ft</property>
                <property>fcs/left-aileron-pos-rad</property>
                <table>
                    <independentVar lookup="row">velocities/mach</independentVar>
                    <tableData>
                        0.0 0.1200
                        2.0 0.0300
                    </tableData>
                </table>
            </product>
        </function>

        <function name="aero/moment/Roll_rudder">
            <description>Roll moment due to rudder</description>
            <product>
                <property>aero/qbar-psf</property>
                <property>metrics/Sw-sqft</property>
                <property>metrics/bw-ft</property>
                <property>fcs/rudder-pos-rad</property>
                <value> 0.0100 </value>
            </product>
        </function>

    </axis>

    <axis name="YAW">

        <!-- Stall initiator -->
        <!-- <function name="aero/moment/Yaw_alpha">
            <description>Yaw moment due to alpha</description>
            <product>
                <property>aero/qbar-psf</property>
                <property>metrics/Sw-sqft</property>
                <property>metrics/bw-ft</property>
                <property>aero/alpha-rad</property>
                <property>fcs/gear-no-wow</property>
                <table>
                    <independentVar lookup="row">aero/beta-rad</independentVar>
                    <independentVar lookup="column">aero/Re</independentVar>
                    <tableData>
                        14561726 16017897
                        -0.3491 -1.0000 0.0000
                        0.3491 1.0000 0.0000
                    </tableData>
                </table>
            </product>
        </function> -->

        <function name="aero/moment/Yaw_beta">
            <description>Yaw moment due to beta</description>
            <product>
                <property>aero/qbar-psf</property>
                <property>metrics/Sw-sqft</property>
                <property>metrics/bw-ft</property>
                <property>aero/beta-rad</property>
                <table>
                    <independentVar lookup="row">aero/alpha-deg</independentVar>
                    <independentVar lookup="column">aero/beta-deg</independentVar>
                    <independentVar lookup="table">velocities/mach</independentVar>
                    <tableData breakpoint="0.001">
                                            -10.0           0.0             10.0
                            -10.0   -13.651385      0.395439        80.944618
                            0.0     11.002746       -6.180853       -2692.789749
                            10.0    -20.372162      0.657466        8.107590
                    </tableData>
                    <tableData breakpoint="0.45">
                                            -10.0           0.0             10.0
                            -10.0   33.657287       -12.860817      -12844.548860
                            0.0     84.839889       -3.087027       33.989312
                            10.0    32.126230       -6.432422       -63.024001
                    </tableData>
                    <tableData breakpoint="0.9">
                                            -10.0           0.0             10.0
                            -10.0   1077811.671480  -243.024356     279.299323
                            0.0     -95190.614740   47.354488       -19.649999
                            10.0    -123.064295     -29.239418      7524.993885
                    </tableData>
                </table>
            </product>
        </function>

        <function name="aero/moment/Yaw_roll_rate">
            <description>Yaw moment due to roll rate</description>
            <product>
                <property>aero/qbar-psf</property>
                <property>metrics/Sw-sqft</property>
                <property>metrics/bw-ft</property>
                <property>aero/bi2vel</property>
                <property>velocities/p-rad_sec</property>
                <table>
                    <independentVar lookup="row">aero/Re</independentVar>
                    <tableData>
                        14561726 -0.2896
                        16017897 -0.0230
                        21842586 -0.0102
                        29150180 -0.0057
                    </tableData>
                </table>
            </product>
        </function>

        <function name="aero/moment/Yaw_damp">
            <description>Yaw moment due to yaw rate</description>
            <product>
                <property>aero/qbar-psf</property>
                <property>metrics/Sw-sqft</property>
                <property>metrics/bw-ft</property>
                <property>aero/bi2vel</property>
                <property>velocities/r-aero-rad_sec</property>
                <value> -0.4389 </value>
            </product>
        </function>

        <function name="aero/moment/Yaw_rudder">
            <description>Yaw moment due to rudder</description>
            <product>
                <property>aero/qbar-psf</property>
                <property>metrics/Sw-sqft</property>
                <property>metrics/bw-ft</property>
                <property>fcs/rudder-pos-rad</property>
                <value> -0.2189 </value>
            </product>
        </function>

        <function name="aero/moment/Yaw_aileron">
            <description>Adverse yaw</description>
            <product>
                <property>aero/qbar-psf</property>
                <property>metrics/Sw-sqft</property>
                <property>metrics/bw-ft</property>
                <property>fcs/left-aileron-pos-rad</property>
                <value> 0.0000 </value>
            </product>
        </function>

    </axis>

</aerodynamics>
